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/batch
! ANSYS input file written by Workbench version 2022 R2
! File used for geometry attach: D:\Schule\Diplomarbeit\Konstruktion_Konzept\Konstruktionskonzept Stranger\011_010.stp
/title,AnsysAnalyse_Probe--Statisch-mechanisch (A5)
/COM,/COM,     ANSYSMotion, 2022.2
/com,--- Data in consistent MKS units. See Solving Units in the help system for more information.
/units,MKS
/prep7
! Turn off shape checking because checks already performed inside WB mesher.
! See help system for more information.
SHPP,OFF,,NOWARN
etcon,set             ! allow ANSYS to choose best KEYOP's for 180x elements, resets any applicable keyopt to MAPDL defaults
/com,*********** Nodes for the whole assembly ***********
nblock,3,,13858
(1i9,3e20.9e3)
        1    -6.500000000E-03     6.800000000E-02     8.500000000E-03
        2    -6.500000000E-03    -6.800000000E-02     8.500000000E-03
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-1
/com,*********** Elements for Body 1 "011_010-FreeParts|011_010" ***********
et,1,187
eblock,19,solid,,7545
(19i9)
        1        1        1        1        0        0        0        0       10        0        1     1507     1901     1796     1799    11561    12528    11557    11558
    12533    12524
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-1
/com,*********** Send User Defined Coordinate System(s) ***********
csys,0
toffst,273.15,  ! Temperature offset from absolute zero
/com,*********** Set Reference Temperature ***********
tref,22.
/com,*********** Send Materials ***********
Temperature = 'TEMP' ! Temperature
MP,DENS,1,7850,	! kg m^-3
MP,ALPX,1,1.2e-05,	! C^-1
MP,C,1,434,	! J kg^-1 C^-1
MP,KXX,1,60.5,	! W m^-1 C^-1
MP,RSVX,1,1.7e-07,	! kg m^3 A^-2 s^-3
MP,EX,1,200000000000,	! Pa
MP,NUXY,1,0.3,
MP,MURX,1,10000,

!************************* Model Summary ********************
!011_010-FreeParts|011_010,	Baustahl,	matid,	1
!************************* End Model Summary ********************
/com,*********** Fixed Supports ***********
CMBLOCK,_FIXEDSU,NODE,       27
(8i10)
       311       312       315       316       353       363       472       473
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cmsel,s,_FIXEDSU
d,all,all
nsel,all
/com,*********** Define Force Using Surface Effect Elements ***********
local,12,0,0.,0.,0.,0.,0.,0.
csys,0
et,2,154
eblock,10,,,14
(15i9)
     9958        2        2        2       12       71      544     1040     1040     2534     6245     1040     2536
     9959        2        2        2       12       72       71     1040     1040     2533     2536     1040     2543
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-1
esel,s,type,,2
keyop,2,2,1                ! Apply load in local coordinate system
keyop,2,7,1                ! Use original area so load is constant in large deformation
esel,all
/com,*********** Define Force Using Surface Effect Elements ***********
local,13,0,0.,0.,0.,0.,0.,0.
csys,0
et,3,154
eblock,10,,,16
(15i9)
     9972        3        3        3       13       59      539     1043     1043     2457     6200     1043     2459
     9973        3        3        3       13      540       60      225      225     2463     2462      225     3836
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-1
esel,s,type,,3
keyop,3,2,1                ! Apply load in local coordinate system
keyop,3,7,1                ! Use original area so load is constant in large deformation
esel,all
/com,*********** Define Force Using Surface Effect Elements ***********
local,14,0,0.,0.,0.,0.,0.,0.
csys,0
et,4,154
eblock,10,,,16
(15i9)
     9988        4        4        4       14      555      121     1135     1135     2865     2868     1135     6285
     9989        4        4        4       14      119     1135      120      120     2848     2853      120     2840
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-1
esel,s,type,,4
keyop,4,2,1                ! Apply load in local coordinate system
keyop,4,7,1                ! Use original area so load is constant in large deformation
esel,all
/com,*********** Define Force Using Surface Effect Elements ***********
local,15,0,0.,0.,0.,0.,0.,0.
csys,0
et,5,154
eblock,10,,,16
(15i9)
    10004        5        5        5       15      569      135      938      938     2997     3000      938     6340
    10005        5        5        5       15      144      569      938      938     3080     6340      938     3081
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-1
esel,s,type,,5
keyop,5,2,1                ! Apply load in local coordinate system
keyop,5,7,1                ! Use original area so load is constant in large deformation
esel,all
/com,*********** Define Force Using Surface Effect Elements ***********
local,16,0,0.,0.,0.,0.,0.,0.
csys,0
et,6,154
eblock,10,,,16
(15i9)
    10020        6        6        6       16      613      128      936      936     2933     2936      936     6552
    10021        6        6        6       16      209      613      936      936     3685     6552      936     3686
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-1
esel,s,type,,6
keyop,6,2,1                ! Apply load in local coordinate system
keyop,6,7,1                ! Use original area so load is constant in large deformation
esel,all
/com,*********** Define Force Using Surface Effect Elements ***********
local,17,0,0.,0.,0.,0.,0.,0.
csys,0
et,7,154
eblock,10,,,14
(15i9)
    10036        7        7        7       17      538       95      190      190     2688     2687      190     3517
    10037        7        7        7       17      600      191      943      943     3526     3527      943     6482
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-1
esel,s,type,,7
keyop,7,2,1                ! Apply load in local coordinate system
keyop,7,7,1                ! Use original area so load is constant in large deformation
esel,all
/com,*********** Define Force Using Surface Effect Elements ***********
local,18,0,0.,0.,0.,0.,0.,0.
csys,0
et,8,154
eblock,10,,,14
(15i9)
    10050        8        8        8       18      198      605      942      942     3587     6510      942     3588
    10051        8        8        8       18      941      199     1047     1047     3597     3598     1047     8206
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-1
esel,s,type,,8
keyop,8,2,1                ! Apply load in local coordinate system
keyop,8,7,1                ! Use original area so load is constant in large deformation
esel,all
/com,*********** Define Force Using Surface Effect Elements ***********
local,19,0,0.,0.,0.,0.,0.,0.
csys,0
et,9,154
eblock,10,,,16
(15i9)
    10064        9        9        9       19      577      155      939      939     3180     3184      939     6384
    10065        9        9        9       19      157      577      939      939     3202     6384      939     3203
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-1
esel,s,type,,9
keyop,9,2,1                ! Apply load in local coordinate system
keyop,9,7,1                ! Use original area so load is constant in large deformation
esel,all
/com,*********** Define Force Using Surface Effect Elements ***********
local,20,0,0.,0.,0.,0.,0.,0.
csys,0
et,10,154
eblock,10,,,16
(15i9)
    10080       10       10       10       20       65      542     1042     1042     2491     6226     1042     2493
    10081       10       10       10       20       66     1042      238      238     2498     3958      238     2495
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-1
esel,s,type,,10
keyop,10,2,1                ! Apply load in local coordinate system
keyop,10,7,1                ! Use original area so load is constant in large deformation
esel,all
/com,*********** Define Force Using Surface Effect Elements ***********
local,21,0,0.,0.,0.,0.,0.,0.
csys,0
et,11,154
eblock,10,,,16
(15i9)
    10096       11       11       11       21       53      545     1035     1035     2418     6258     1035     2420
    10097       11       11       11       21      546       54      293      293     2424     2423      293     4464
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-1
esel,s,type,,11
keyop,11,2,1                ! Apply load in local coordinate system
keyop,11,7,1                ! Use original area so load is constant in large deformation
esel,all
fini
/com,****************************************************************************
/com,*************************    SOLUTION       ********************************
/com,****************************************************************************
/solu
antype,0                   ! static analysis
_thickRatio=  1     ! Ratio of thick parts in the model
eqsl,pcg,1e-8,,,,,,1
cntr,print,1               ! print out contact info and also make no initial contact an error
dmpoption,emat,no             ! Don't combine emat file for DANSYS
dmpoption,esav,no             ! Don't combine esav file for DANSYS
nldiag,cont,iter           ! print out contact info each equilibrium iteration
rescontrol,,none                 ! Do not keep any restart files
/com,****************************************************
/com,******************* SOLVE FOR LS 1 OF 1 ****************
esel,s,type,,2
nsle
sfe,all,1,pres,1,-1160274.59955979
sfe,all,2,pres,1,0.
sfe,all,3,pres,1,0.
esel,s,type,,3
nsle
sfe,all,1,pres,1,-1161471.50797343
sfe,all,2,pres,1,0.
sfe,all,3,pres,1,0.
esel,s,type,,4
nsle
sfe,all,1,pres,1,-1150764.48604948
sfe,all,2,pres,1,0.
sfe,all,3,pres,1,0.
esel,s,type,,5
nsle
sfe,all,1,pres,1,-1155948.98945671
sfe,all,2,pres,1,0.
sfe,all,3,pres,1,0.
esel,s,type,,6
nsle
sfe,all,1,pres,1,-1156638.43549866
sfe,all,2,pres,1,0.
sfe,all,3,pres,1,0.
esel,s,type,,7
nsle
sfe,all,1,pres,1,-1157785.05892605
sfe,all,2,pres,1,0.
sfe,all,3,pres,1,0.
esel,s,type,,8
nsle
sfe,all,1,pres,1,-1138522.54831369
sfe,all,2,pres,1,0.
sfe,all,3,pres,1,0.
esel,s,type,,9
nsle
sfe,all,1,pres,1,-1144528.28695472
sfe,all,2,pres,1,0.
sfe,all,3,pres,1,0.
esel,s,type,,10
nsle
sfe,all,1,pres,1,-1137816.10519529
sfe,all,2,pres,1,0.
sfe,all,3,pres,1,0.
esel,s,type,,11
nsle
sfe,all,1,pres,1,-1138468.93423066
sfe,all,2,pres,1,0.
sfe,all,3,pres,1,0.
nsel,all
esel,all
nsub,1,1,1
time,1.
outres,erase
outres,all,none
outres,nsol,all,
outres,rsol,all
outres,eangl,all
outres,etmp,all
outres,veng,all
outres,strs,all,
outres,epel,all,
outres,eppl,all,
outres,cont,all,
! *********** WB SOLVE COMMAND ***********
! check interactive state
*get,ANSINTER_,active,,int
*if,ANSINTER_,ne,0,then
/eof
*endif
solve
/com *************** Write FE CONNECTORS *********
CEWRITE,file,ce,,INTE
/com,****************************************************
/com,*************** FINISHED SOLVE FOR LS 1 *************
*get,_NSOLTHREADS,active,0,ntfs
*get,_NSOLPROCESSES,active,0,npfs
*get,_PCGITER,active,,solu,cgiter
/post1
fini
